*Heading
** Job name: GNIA Model name: GNIA
** Generated by: Abaqus/CAE 2019
*Preprint, echo=NO, model=NO, history=NO, contact=NO
**
** PARTS
**
*Part, name=PART-1
*Node
      1,   499.630005,           0.,           0.
      2,    499.47525,   13.0792198,           0.
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*Element, type=S4R
    1,     1,     2,   242,   241
    2,     2,     3,   243,   242
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*Nset, nset=PART-1-RefPt_, internal
 99999,
*Elset, elset=ESHELL, generate
     1,  14400,      1
*Elset, elset=Set-3, generate
     1,  14400,      1
*Orientation, name=Ori-1, system=CYLINDRICAL
          0.,           0.,           0.,           0.,           0.,           1.
1, 90.
** Section: Section-1
*Shell Section, elset=Set-3, material=STEEL, orientation=Ori-1
1., 5
*End Part
**
**
** ASSEMBLY
**
*Assembly, name=Assembly
**
*Instance, name=PART-1-1, part=PART-1
*End Instance
**
*Nset, nset=ALL, instance=PART-1-1, generate
     1,  14640,      1
*Elset, elset=ALLEL, instance=PART-1-1, generate
     1,  14400,      1
*Nset, nset=Monitor-2, instance=PART-1-1
 14640,
*Nset, nset=RP-1, instance=PART-1-1
 99998,
*Nset, nset=RP-2, instance=PART-1-1
 99999,
*Nset, nset=SET-BOTTOM_EDGE, instance=PART-1-1, generate
   1,  240,    1
*Nset, nset=SET-TOP_EDGE, instance=PART-1-1, generate
 14401,  14640,      1
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*Elset, elset=_Surf-1_SPOS, internal, instance=PART-1-1, generate
     1,  14400,      1
*Surface, type=ELEMENT, name=Surf-1
_Surf-1_SPOS, SPOS
*End Assembly
**
** MATERIALS
**
** -------------------------------------------------------
**
** COMMENTS FROM *DAMPING
** ======================
**
** -------------------------------------------------------
*Material, name=STEEL
*Density
 7.8e-09,
*Elastic
210000., 0.29
*Plastic
180.,0.
**
** BOUNDARY CONDITIONS
**
** Name: Disp-BC-1 Type: Displacement/Rotation
*Boundary
SET-TOP_EDGE, 1, 1
SET-TOP_EDGE, 2, 2
SET-TOP_EDGE, 3, 3
** Name: Disp-BC-2 Type: Displacement/Rotation
*Boundary
SET-BOTTOM_EDGE, 1, 1
SET-BOTTOM_EDGE, 2, 2
SET-BOTTOM_EDGE, 3, 3
** ----------------------------------------------------------------
**
** STEP: Step-1
**
*Step, name=Step-1, nlgeom=YES, inc=300
*Static, riks
0.01, 1., 1e-50, 0.01, 1.,
**
** LOADS
**
** Name: Load-1   Type: Pressure
*Dsload
Surf-1, P, 1.
**
** OUTPUT REQUESTS
**
*Restart, write, overlay, frequency=1
*Monitor, dof=3, node=Monitor-2, frequency=1
**
** FIELD OUTPUT: F-Output-1
**
*Output, field
*Node Output
RF, U
*Element Output, directions=YES
MISES, P, S
**
** HISTORY OUTPUT: H-Output-1
**
*Output, history, variable=PRESELECT
*End Step
