*Heading
** Job name: LBA Model name: LBA
** Generated by: Abaqus/CAE 2019
*Preprint, echo=NO, model=NO, history=NO, contact=NO
**
** PARTS
**
*Part, name=Part-1
*Node
      1,           0.,         500.,           0.
      2,           0.,         500.,         625.
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*Element, type=S4R
   1,    1,   13, 1025,  210
   2,   13,   14, 1026, 1025
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*Nset, nset=Set-1, generate
     1,  20384,      1
*Elset, elset=Set-1, generate
     1,  20160,      1
** Section: Section-1
*Shell Section, elset=Set-1, material=Steel
1., 5
*End Part
**
**
** ASSEMBLY
**
*Assembly, name=Assembly
**
*Instance, name=Part-1-1, part=Part-1
*End Instance
**
*Nset, nset=Set-1, instance=Part-1-1
    1,    4,    5,    7,    8,   10
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*Elset, elset=Set-1, instance=Part-1-1
     1,    46,    91,   136,   181,   226
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*Elset, elset=_Surf-1_SPOS, internal, instance=Part-1-1, generate
     1,  20160,      1
*Surface, type=ELEMENT, name=Surf-1
_Surf-1_SPOS, SPOS
*End Assembly
**
** MATERIALS
**
*Material, name=Steel
*Elastic
210000., 0.29
** ----------------------------------------------------------------
**
** STEP: Step-1
**
*Step, name=Step-1, nlgeom=NO, perturbation
*Buckle
10, , 18, 3000
**
** BOUNDARY CONDITIONS
**
** Name: BC-1 Type: Displacement/Rotation
*Boundary, op=NEW, load case=1
Set-1, 1, 1
Set-1, 2, 2
Set-1, 3, 3
*Boundary, op=NEW, load case=2
Set-1, 1, 1
Set-1, 2, 2
Set-1, 3, 3
**
** LOADS
**
** Name: Load-1   Type: Pressure
*Dsload
Surf-1, P, 1.
**
** OUTPUT REQUESTS
**
*Restart, write, frequency=0
**
** FIELD OUTPUT: F-Output-1
**
*Output, field, variable=PRESELECT
*End Step
